m := 200 kg
g := 9.81 m/s^2
ρ := 1.225 kg/m^3
C_d := 0.7
μ_r := 0.01
α := 5*deg
v_i := 0 km/hr = 0 m/s
v_f := 3.5 km/hr = 0.972222 m/s
t := 1 s
A := 0.7*m^2
F_aero := 1/2*ρ*C_d*A*v_f^2 = 0.283683 N
F_rr := m*g*cos(α)*μ_r = 19.5453 N
F_gr := m*g*sin(α) = 171 N
a := (v_f - v_i)/t = 0.972222 m/s^2
F_acc := m*a = 194.444 N
F_t := F_aero + F_rr + F_gr + F_acc = 385.273 N
rw := (0.535/2) m
τ_RPMmax := 9.47 N*m
τ_nec := F_t*rw = 103.061 N*m
RPM_max := 370 rev
RPM_custom := RPM_max/2.667 = 138.733 rev
P_aero := F_aero*v_f = 0.275803 W
P_rr := F_rr*v_f = 19.0024 W
τ_RPMcustom := τ_RPMmax*RPM_max/RPM_custom*0.98 = 24.7514 N*m
P_gr := F_gr*v_f = 166.25 W
W := 1/2*m*v_f^2 = 94.5216 J
P_acc := W/t = 94.5216 W
P_t := P_aero + P_rr + P_gr + P_acc = 280.049 W
P_t = 0.280049 kW
